// COMSOL Multiphysics 5.4.0.225 model "1dtest.mph"
// Outline of the model tree

Parameters
  i0 = 1e6
  alphaa = 0.5

Functions
  an1: Analytic "解析 1" | funcname = BV; expr = 1e2*(exp(0.5*F_const*(x)/R_const/1073)-exp(-0.5*F_const*(x)/R_const/1073))
  an2: Analytic "解析 2" | expr = 1e3*(exp(0.5*96485.33289*(x)/8.314/1073)-exp(-0.5*96485.33289*(x)/8.314/1073))

Variables
  var1 "变量 1"
    eta = V2-V-Eeq
    Eeq = 1
    ibv = BV(eta)
    ijf = eta*10

Geometry
  geom1 "几何 1" (1D, length unit m)
    i1: Interval "线段间隔 1" | coord = {0, 1, 2}
    fin: Finalize "形成联合体"

Physics
  cd: SecondaryCurrentDistribution "二次电流分布" (disabled) on all domains
    dependent variable phil
    ice1: Electrolyte "电解质 1" (default) | sigmal_mat = userdef; sigmal = 1
    ins1: Insulation "绝缘 1" (default)
    init1: init "初始值 1" (default)
    pce1: PorousElectrode "多孔电极 1" on domains 2
      sigmal_mat = userdef
      sigmal = 1
      IonicCorrModel = NoCorr
      sigmas_mat = userdef
      sigmas = 10
      ElectricCorrModel = NoCorr
      per1: PorousElectrodeReaction "多孔电极反应 1" (default)
        Eeq = 1
        ElectrodeKinetics = ButlerVolmer
        i0 = 1e2[A/m^2]
        ActiveSpecificSurfaceAreaType = userdef
        Av = 1e6[1/m]
        minput_temperature = 1073[K]
    ec1: ElectrodeCurrent "电极电流 1" (disabled) on boundaries 3
      ElectronicCurrentType = AverageCurrentDensity
      Ias = 1000[A/m^2]
    eip1: ElectrolytePotential "电解质电位 1" on boundaries 1
    pot1: ElectricPotential "电势 1" on boundaries 3 | phisbnd = 0.7[V]
    ic1: ElectrolyteCurrent "电解质电流 1" (disabled) on boundaries 2
      IonicCurrentType = AverageCurrentDensity
      Ial = 1000[A/m^2]
  ec: ConductiveMedia "电流" on domains 1
    dependent variable V
    cucn1: CurrentConservation "电流守恒 1" (default)
      sigma_mat = userdef
      sigma = 1
      epsilonr_mat = userdef
      epsilonr = 1
      materialType = solid
    ein1: ElectricInsulation "电绝缘 1" (default)
    init1: init "初始值 1" (default)
    pot1: ElectricPotential "电势 1" on boundaries 1
    bcs1: BoundaryCurrentSource "边界电流源 1" (disabled) on boundaries 2 | Qjs = -1
    ncd1: NormalCurrentDensity "法向电流密度 1" on boundaries 2 | nJ = ibv
    cs1: CurrentSource "电流源 1" (disabled) on domains 2 | Qj = ibv
  ec2: ConductiveMedia "电流 2" on domains 2
    dependent variable V2
    cucn1: CurrentConservation "电流守恒 1" (default) | sigma_mat = userdef; sigma = 10; epsilonr_mat = userdef; epsilonr = 1
    ein1: ElectricInsulation "电绝缘 1" (default)
    init1: init "初始值 1" (default) | V2 = 0.7
    pot1: ElectricPotential "电势 1" on boundaries 3 | V0 = 0.7
    ncd1: NormalCurrentDensity "法向电流密度 1" on boundaries 2 | nJ = -ibv
    cs1: CurrentSource "电流源 1" (disabled) on domains 2 | Qj = -ibv

Mesh
  mesh1 "网格 1" (physics-controlled)
    size: MeshSizeDefault "大小" | hauto = 1

Studies
  std1 "研究 1"
    stat: Stationary "稳态"

Solver configurations
  sol1 "解 1" (study std1)
    v1: Variables "因变量 1"
    s1: Stationary "稳态求解器 1"
      fc1: FullyCoupled "全耦合 1" | linsolver = d1; minstep = 1.0E-6; maxiter = 250; niter = 250
      d1: Direct "直接 1" | pivotperturb = 1.0E-13

Datasets
  dset1: Solution | solution = sol1

Derived values
  pev1: EvalPoint "点计算 1" on boundaries 2 | data = dset1; table = tbl1; expr = ijf

Tables
  tbl1: Table "表格 1"
    // 点计算 1 (ijf)
    ijf (V), 点: 2 | ijf (V), 点: 2 | ijf (V), 点: 2
    -0.265487 | -0.27027 | -0.27027

Plots
  pg3: PlotGroup1D "一维绘图组 3" | data = dset1
    lngr1: LineGraph "线图 1" on domains 1, 2 | expr = V
    lngr2: LineGraph "线图 2" (disabled) on domains 1, 2 | expr = V2
    lngr3: LineGraph "线图 3" (disabled) on all domains | expr = phil
    lngr4: LineGraph "线图 4" (disabled) on domains 1, 2 | expr = phis
  pg4: PlotGroup1D "一维绘图组 4" | data = dset1
    lngr1: LineGraph "线图 1" on all domains | expr = -ec.JX
    lngr2: LineGraph "线图 2" on all domains | expr = -ec2.Jx
  pg5: PlotGroup1D "一维绘图组 5" | data = dset1
    lngr1: LineGraph "线图 1" on all domains | expr = eta
  pg1: PlotGroup1D "电解质电位 (cd)" | data = dset1
  pg2: PlotGroup1D "电极电位 vs. 接地 (cd)" | data = dset1