// COMSOL Multiphysics 5.4.0.225 model "sofc_unit_cell.mph"
// 固体氧化物燃料电池中的电流密度分布
// modeldescr_bfc/sofc_unit_cell
// 本例研究固体氧化物燃料电池 (SOFC) 中的电流密度分布。该模型包含阴极和阳极的质量平衡，气体通道中的动量平衡，多孔电极里的气体流动，氧离子携带的离子流平衡和电子流平衡之间的全耦合。
// Outline of the model tree

Parameters
  p_atm = 1[atm]  // Atmospheric pressure
  T = 800[degC]  // Temperature
  mu = 3e-5[Pa*s]  // Viscosity, air
  dp_a = 2[Pa]  // Pressure drop, anode
  dp_c = 6[Pa]  // Pressure drop, cathode
  i0_a = 0.1[A/m^2]  // Exchange current density, anode
  i0_c = 0.01[A/m^2]  // Exchange current density, cathode
  Sa_a = 1e9[1/m]  // Specific surface area, anode
  Sa_c = 1e9[1/m]  // Specific surface area, cathode
  V_pol = 0.05[V]  // Initial cell polarization
  perm_a = 1e-10[m^2]  // Anode permeability
  perm_c = 1e-10[m^2]  // Cathode permeability
  Eeq_a = 0[V]  // Equilibrium voltage, anode
  Eeq_c = 1[V]  // Equilibrium voltage, cathode
  V_cell = 0.7  // Cell voltage
  kleff_a = 1[S/m]  // Electrolyte effective conductivity, anode
  kseff_a = 1000[S/m]  // Solid effective conductivity, anode
  kleff_c = 1[S/m]  // Electrolyte effective conductivity, cathode
  kseff_c = 1000[S/m]  // Solid effective conductivity, cathode
  kl = 5[S/m]  // Electrolyte conductivity
  ks = 5000[S/m]  // Current collector conductivity
  vh2 = 6e-6  // Kinetic volume, H2
  vo2 = 16.6e-6  // Kinetic volume, O2
  vn2 = 17.9e-6  // Kinetic volume, N2
  vh2o = 12.7e-6  // Kinetic volume, H2O
  Mh2 = 2[g/mol]  // Molar mass, H2
  Mo2 = 32[g/mol]  // Molar mass, O2
  Mn2 = 28[g/mol]  // Molar mass, N2
  Mh2o = 18[g/mol]  // Molar mass, H2O
  kd = 3.16e-8[m^2/s]  // Reference diffusivity
  e_por = 0.4  // Porosity
  Dh2h2o = kd*(T[1/K])^1.75/(p_atm[1/Pa]*(vh2^(1/3)+vh2o^(1/3))^2)*(1[kg/mol]/Mh2+1[kg/mol]/Mh2o)^0.5  // Diffusivity, H2-H2O
  Do2h2o = kd*(T[1/K])^1.75/(p_atm[1/Pa]*(vo2^(1/3)+vh2o^(1/3))^2)*(1[kg/mol]/Mo2+1[kg/mol]/Mh2o)^0.5  // Diffusivity, O2-H2O
  Do2n2 = kd*(T[1/K])^1.75/(p_atm[1/Pa]*(vo2^(1/3)+vn2^(1/3))^2)*(1[kg/mol]/Mo2+1[kg/mol]/Mn2)^0.5  // Diffusivity, O2-N2
  Dn2h2o = kd*(T[1/K])^1.75/(p_atm[1/Pa]*(vh2o^(1/3)+vn2^(1/3))^2)*(1[kg/mol]/Mh2o+1[kg/mol]/Mn2)^0.5  // Diffusivity, N2-H2O
  w_h2ref = 0.4  // Inlet weight fraction, H2 at anode
  w_o2ref = 0.15  // Inlet weight fraction, O2 at cathode
  w_h2oref = 0.37  // Inlet weight fraction, H2O at cathode
  c_tot = p_atm/(R_const*T)  // Total molar concentration
  c_o2ref = c_tot*(w_o2ref/Mo2)/(w_o2ref/Mo2+w_h2oref/Mh2o+(1-w_o2ref-w_h2oref)/Mn2)  // Reference concentration, O2 at cathode
  c_h2ref = c_tot*(w_h2ref/Mh2)/(w_h2ref/Mh2+(1-w_h2ref)/Mh2o)  // Reference concentration, H2 at anode
  c_h2oref = c_tot*((1-w_h2ref)/Mh2o)/(w_h2ref/Mh2+(1-w_h2ref)/Mh2o)  // Reference concentration, H2O at anode
  W_channel = 0.5e-3[m]  // Gas flow channel width
  W_rib = 0.5e-3[m]  // Rib width
  H_gde = 1e-4[m]  // Gas diffusion electrode thickness
  H_electrolyte = 1e-4[m]  // Electrolyte thickness
  H_channel = 0.5e-3[m]  // Gas flow channel height
  L = 10e-3[m]  // Flow channel length

Selections
  sel1: Explicit "Anode Flow Channel" on domains 4
  sel2: Explicit "Anode Electrode" on domains 1
  sel3: Explicit "Cathode Electrode" on domains 3
  sel4: Explicit "Cathode Flow Channel" on domains 5

Probes
  dom1: Domain "Cell Current Density Probe" on selection sel2
    probename = I_cell
    expr = cd.ivtot*H_gde
    unit = A/m^2
    descr = Average cell current density
    frame = spatial
    table = tbl1

Geometry
  geom1 "Geometry 1" (3D, length unit m)
    wp1: WorkPlane | quickplane = yz; unite = on
      r1: Rectangle | size = {W_channel+W_rib, H_gde}
      r2: Rectangle | pos = {0, -H_electrolyte}; size = {W_channel+W_rib, H_electrolyte}
      r3: Rectangle | pos = {0, -H_electrolyte-H_gde}; size = {W_channel+W_rib, H_gde}
      r4: Rectangle | pos = {W_rib/2, H_gde}; size = {W_channel, H_channel}
      r5: Rectangle | pos = {W_rib/2, -H_gde-H_electrolyte-H_channel}; size = {W_channel, H_channel}
    ext1: Extrude | workplane = wp1; input = wp1; distance = L
    fin: Finalize "Form Union"

Physics
  cd: SecondaryCurrentDistribution on domains 1-3
    dependent variable phil
    ice1: Electrolyte (default) | sigmal_mat = userdef; sigmal = kl
    ins1: Insulation (default)
    init1: init "Initial Values 1" (default)
    pce1: PorousElectrode on selection sel2
      sigmal_mat = userdef
      sigmal = kleff_a
      IonicCorrModel = NoCorr
      sigmas_mat = userdef
      sigmas = kseff_a
      ElectricCorrModel = NoCorr
    pce2: PorousElectrode on selection sel3
      sigmal_mat = userdef
      sigmal = kleff_c
      IonicCorrModel = NoCorr
      sigmas_mat = userdef
      sigmas = kseff_c
      ElectricCorrModel = NoCorr
    egnd1: ElectricGround on boundaries 3, 20
    pot1: ElectricPotential on boundaries 10, 22 | phisbnd = V_cell
    init2: init "Initial Values 2" on domains 3 | phis = V_cell
    ecd1: ElectrodeNormalCurrentDensity "电极电流密度 1" (disabled) on boundaries 9
      nis_type = NormalElectrodeCurrentDensity
      nis = 2000[A/m^2]
    ecd2: ElectrodeNormalCurrentDensity "电极电流密度 2" (disabled) on boundaries 6
      nis_type = NormalElectrodeCurrentDensity
      nis = -2000[A/m^2]
    icd1: ElectrolyteNormalCurrentDensity "电解质电流密度 1" on boundaries 9 | nil = -2000[A/m^2]
    icd2: ElectrolyteNormalCurrentDensity "电解质电流密度 2" on boundaries 6 | nil = 2000[A/m^2]
    eip1: ElectrolytePotential "电解质电位 1" on boundaries 9
    ec1: ElectrodeCurrent "电极电流 1" (disabled) on boundaries 9 | Its = -2000[A]; phis0init = 0[V]
    ec2: ElectrodeCurrent "电极电流 2" (disabled) on boundaries 6 | Its = 2000[A]; phis0init = 0.3[V]
  br: Brinkman "Brinkman Equations - Cathode" (disabled) on domains 3, 5
    dependent variable u_c = {u_c, v_c, w_c}
    dependent variable p_c
    ShapeProperty.order_fluid = 1
    PhysicalModelProperty.StokesFlowProp = 0
    PhysicalModelProperty.Compressibility = CompressibleMALT03
    PhysicalModelProperty.pref = p_atm
    fmp1: FluidAndMatrixProperties (default)
      mu_mat = userdef
      mu = mu
      epsilon_p_mat = userdef
      epsilon_p = e_por
      kappa_mat = userdef
      kappa = perm_c
    init1: init "Initial Values 1" (default)
    wallbc1: WallBC "Wall 1" (default)
    fp1: FluidProperties on selection sel4 | mu_mat = userdef; mu = mu
    inl1: InletBoundary "Inlet 1" on boundaries 30 | BoundaryCondition = Pressure; p0 = dp_c
    out1: OutletBoundary "Outlet 1" on boundaries 15 | NormalFlow = 1
    wallbc2: WallBC "Wall 2" on boundaries 8, 25 | BoundaryCondition = Slip
  tcs: ConcentratedSpecies "Transport of Concentrated Species - Cathode" (disabled) on domains 3, 5
    dependent variable wO2 = {wO2, wH2O_c, wN2}
    TransportMechanism.DiffusionModel = MaxwellStefan
    TransportMechanism.MassTransferInPorousMedia = 1
    SpeciesProperties.FromMassConstraint = 3
    cdm1: ConvectionDiffusionMigration "Transport Properties 1" (default)
      M_wO2 = Mo2
      M_wH2O_c = Mh2o
      M_wN2 = Mn2
      DF = {Do2h2o, Do2n2, Dn2h2o}
      minput_temperature = T
    init1: init "Initial Values 1" (default) | w0 = {w_o2ref, w_h2oref, 0.1}
    nflx1: NoFlux (default)
    pmtcs1: TCSPorousMediaTransportProperties "Porous Media Transport Properties 1" on selection sel3
      M_wO2 = Mo2
      M_wH2O_c = Mh2o
      M_wN2 = Mn2
      DF = {Do2h2o, Do2n2, Dn2h2o}
      FluidDiffusivityModelType = BruggemanModel
      minput_temperature = T
    pec1: PorousElectrodeCoupling on selection sel3
      rc1: ReactionCoefficients (default) | iv_src = userdef; iv = 0; nm = 4; Vi = {-1, 0, 0}
    in1: Inflow on boundaries 30 | w0 = {w_o2ref, w_h2oref, 0.1}
    out1: Outflow on boundaries 15
  br2: Brinkman "Brinkman Equations 2 - Anode" (disabled) on domains 1, 4
    dependent variable u_a = {u_a, v_a, w_a}
    dependent variable p_a
    ShapeProperty.order_fluid = 1
    PhysicalModelProperty.StokesFlowProp = 0
    PhysicalModelProperty.Compressibility = CompressibleMALT03
    PhysicalModelProperty.pref = p_atm
    fmp1: FluidAndMatrixProperties (default)
      mu_mat = userdef
      mu = mu
      epsilon_p_mat = userdef
      epsilon_p = e_por
      kappa_mat = userdef
      kappa = perm_a
    init1: init "Initial Values 1" (default)
    wallbc1: WallBC "Wall 1" (default)
    fp1: FluidProperties on selection sel1 | mu_mat = userdef; mu = mu
    inl1: InletBoundary "Inlet 1" on boundaries 11 | BoundaryCondition = Pressure; p0 = dp_a
    out1: OutletBoundary "Outlet 1" on boundaries 29 | NormalFlow = 1
    wallbc2: WallBC "Wall 2" on boundaries 2, 23 | BoundaryCondition = Slip
  tcs2: ConcentratedSpecies "Transport of Concentrated Species 2 - Anode" (disabled) on domains 1, 4
    dependent variable wH2 = {wH2, wH2O_a}
    TransportMechanism.DiffusionModel = MaxwellStefan
    TransportMechanism.MassTransferInPorousMedia = 1
    SpeciesProperties.FromMassConstraint = 2
    cdm1: ConvectionDiffusionMigration "Transport Properties 1" (default)
      M_wH2 = Mh2
      M_wH2O_a = Mh2o
      DF = Dh2h2o
      minput_temperature = T
    init1: init "Initial Values 1" (default) | w0 = {w_h2ref, 0.1}
    nflx1: NoFlux (default)
    pmtcs1: TCSPorousMediaTransportProperties "Porous Media Transport Properties 1" on selection sel2
      M_wH2 = Mh2
      M_wH2O_a = Mh2o
      DF = Dh2h2o
      FluidDiffusivityModelType = BruggemanModel
      minput_temperature = T
    pec1: PorousElectrodeCoupling on selection sel2
      rc1: ReactionCoefficients (default) | iv_src = userdef; iv = 0; nm = 2; Vi = {1, -1}
    in1: Inflow on boundaries 11 | w0 = {w_h2ref, 0.1}
    out1: Outflow on boundaries 29

Multiphysics
  rf1: ReactingFlow (disabled) on all domains | Fluid_physics = br; Species_physics = tcs
  rf2: ReactingFlow (disabled) on all domains | Fluid_physics = br2; Species_physics = tcs2

Mesh
  mesh1 "Mesh 1"
    size: MeshSizeDefault | hmax = 0.001; hmin = 1.8E-4; hcurve = 0.6; hnarrow = 0.5; hgrad = 1.5
    edg1: Edge on edges 2, 10, 15, 18, 24, 27
      size1: Size on edges 2, 10, 15, 18, 24, 27 | hmax = W_channel/8; custom = on
    map1: Map "Mapped 1" on boundaries 1, 4, 7, 11, 15
      dis1: Distribution on edges 12, 17, 22, 26 | type = predefined; elemcount = 10; elemratio = 3; symmetric = on
      dis2: Distribution on edges 7, 34 | type = predefined; elemcount = 8; elemratio = 3
      dis3: Distribution on edges 1, 30 | type = predefined; reverse = on; elemcount = 8; elemratio = 3
      dis4: Distribution on edges 4, 32 | numelem = 3
    swe1: Sweep "Swept 1" on remaining entities
      size1: Size on entire geometry | hmax = W_channel; custom = on

Studies
  std1 "Study 1"
    stat: Stationary | solve for = {cd}; activateCoupling = {rf1, off, rf2, off}
    stat2: Stationary | solve for = {br}; activateCoupling = {rf1, off, rf2, off}
    stat3: Stationary | solve for = {br2}; activateCoupling = {rf1, off, rf2, off}
    stat4: Stationary | useparam = on; pname = V_pol; plistarr = 0.05 range(0.1,0.1,0.8); punit = V
  std2 "研究 2"
    stat: Stationary "稳态"

Solver configurations
  sol1 "Solution 1" (study std1)
    v1: Variables "Dependent Variables 1"
    s1: Stationary "Stationary Solver 1"
      fc1: FullyCoupled | linsolver = d1; minstep = 1.0E-6
      d1: Direct | linsolver = pardiso; pivotperturb = 1.0E-13
    su1: StoreSolution
    v2: Variables "Dependent Variables 2" | initmethod = sol; notsolmethod = sol
    s2: Stationary "Stationary Solver 2"
      fc1: FullyCoupled | linsolver = d1; initstep = 0.01; minstep = 1.0E-6; maxiter = 100
      d1: Direct | linsolver = pardiso; pivotperturb = 1.0E-13
    su2: StoreSolution
    v3: Variables "Dependent Variables 3" | initmethod = sol; notsolmethod = sol
    s3: Stationary "Stationary Solver 3"
      fc1: FullyCoupled | linsolver = d1; initstep = 0.01; minstep = 1.0E-6; maxiter = 100
      d1: Direct | linsolver = pardiso; pivotperturb = 1.0E-13
    su3: StoreSolution
    v4: Variables "Dependent Variables 4" | initmethod = sol; notsolmethod = sol
    s4: Stationary "Stationary Solver 4"
      p1: Parametric
      se1: Segregated
        maxsegiter = 200
        segstabacc = segcflcmp
        subinitcfl = 2
        subkppid = 0.6
        subkdpid = 0.02
        subcfltol = 0.075
        ss5: SegregatedStep | linsolver = d5; subdamp = 0.35; subtermconst = itertol; subiter = 3; subntolfact = 1
        ss1: SegregatedStep | segvar = {comp1_phil, comp1_phis}; linsolver = d1
        ss2: SegregatedStep "Velocity u_c, Pressure p_c" | linsolver = d2; subdamp = 0.5
        ss3: SegregatedStep | linsolver = d3; subdamp = 0.35; subtermconst = itertol; subiter = 3; subntolfact = 1
        ss4: SegregatedStep "Velocity u_a, Pressure p_a" | linsolver = d4; subdamp = 0.5
        pfl1: SegregatedStep "分离步 1"
        tds1: SegregatedStep "分离步 1a"
        spf1: SegregatedStep "分离步 1b"
      d1: Direct | linsolver = pardiso; pivotperturb = 1.0E-13
      d2: Direct | linsolver = pardiso; pivotperturb = 1.0E-13
      d3: Direct | linsolver = pardiso; pivotperturb = 1.0E-13
      d4: Direct | linsolver = pardiso; pivotperturb = 1.0E-13
      d5: Direct | linsolver = pardiso; pivotperturb = 1.0E-13
  sol2 "Solution Store 1" (study std1)
  sol3 "Solution Store 2" (study std1)
  sol4 "Solution Store 3" (study std1)
  sol5 "解 5" (study std2)
    v1: Variables "因变量 1"
    s1: Stationary "稳态求解器 1"
      fc1: FullyCoupled "全耦合 1" | linsolver = d1; minstep = 1.0E-6
      d1: Direct "直接 1" | linsolver = pardiso; pivotperturb = 1.0E-13

Datasets
  dset1: Solution | solution = sol1
  dset2: Solution | solution = sol2
  dset3: Solution | solution = sol3
  dset4: Solution | solution = sol4
  dset5: Solution "Probe Solution 5" | solution = sol5
  avh1: Average "Cell Current Density Probe" on domains 1 | data = dset5
  dset6: Solution | solution = sol5
  cpl1: CutPlane "截面 1" | data = dset6

Derived values
  pev1: EvalPoint "Cell Current Density Probe" | data = avh1; table = tbl1; expr = cd.ivtot*H_gde

Tables
  tbl1: Table "Probe Table 1"
    Average cell current density (A/m^2), Cell Current Density Probe
    0

Plots
  pg1: PlotGroup1D "Probe Plot Group 1"
    tblp1: Table "Probe Table Graph 1" | table = tbl1
  pg2: PlotGroup3D "Oxygen Mole Fraction" | data = dset1
    slc1: Slice | expr = tcs.x_wO2; descr = Mole fraction; quickxnumber = 20
  pg3: PlotGroup3D "Hydrogen Mole Fraction" | data = dset1
    slc1: Slice | expr = tcs2.x_wH2; descr = Mole fraction; quickxnumber = 20
  pg4: PlotGroup1D "Polarization Curve"
    data = dset1
    title = Polarization curve
    xlabel = Average current density (A/m<sup>2</sup>)
    ylabel = V<sub>cell</sub> (V)
    glob1: Global | expr = V_cell; descr = Cell Voltage; xdata = expr; xdataexpr = I_cell
  pg5: PlotGroup1D "Power vs Current"
    data = dset1
    title = Total output power
    xlabel = Average current density (A/m<sup>2</sup>)
    ylabel = Average Cell Power (W/m<sup>2</sup>)
    glob1: Global | expr = V_cell*I_cell; descr = Average Cell Power; xdata = expr; xdataexpr = I_cell
  pg6: PlotGroup3D "Electrolyte Current Density" | data = dset1
    surf1: Surface | expr = cd.Ilz
      sel1: Selection on boundaries 9
  pg7: PlotGroup3D "电解质电位 (cd)" | data = dset6
    mslc1: Multislice "多切面 1" | expr = phil
    arwv1: ArrowVolume "体箭头 1" | expr = {cd.Ilx, cd.Ily, cd.Ilz}
  pg8: PlotGroup3D "电解质电流密度 (cd)" | data = dset6
    arwv1: ArrowVolume "体箭头 1" | expr = {cd.Ilx, cd.Ily, cd.Ilz}
      col1: Color "颜色表达式 1" | expr = root.comp1.cd.IlMag
  pg9: PlotGroup3D "电极电位 vs. 接地 (cd)" | data = dset6
    mslc1: Multislice "多切面 1" | expr = phis
  pg10: PlotGroup3D "电极电流密度 (cd)" | data = dset6
    arwv1: ArrowVolume "体箭头 1" | expr = {cd.Isx, cd.Isy, cd.Isz}
      col1: Color "颜色表达式 1" | expr = root.comp1.cd.IsMag
  pg11: PlotGroup2D "电势二维" | data = cpl1
    surf1: Surface "表面 1" | expr = phil
    surf2: Surface "表面 2" (disabled) | expr = phis